OpenVSP model (file version 4), 9 components.
Geometry view with OpenVSP parameter names; values to 6 digits, angles in degrees, lengths in the model's unit.
Overall bounding box: X_Min=-2.42 X_Len=8.20374 Y_Min=-5.5247 Y_Len=11.0494 Z_Min=-1.13788 Z_Len=3.06225

Wing "Wing"
  location (X Y Z) -0.42 0 0.77, rotation 0 0 0
  symmetric about XZ
  bounding box size 1.67015 11.0494 0.302809
  totals: TotalSpan=10.998 TotalProjectedSpan=10.9938 TotalChord=1.30121 TotalArea=16.7577 TotalAR=7.21248
  root: chord 1.67, twist 0, NACA 4-series Camber=0.02 CamberLoc=0.4 ThickChord=0.12
  sections:
    n  Span   Root_Chord  Tip_Chord  Area       Sweep  Sweep_Location  Dihedral  Twist  Twist_Location  tip airfoil
    1  0.55   1.67        1.67       0.9185     0      0               0         0      0.25            as above
    2  2.09   1.67        1.67       3.4903     0      0               1.7       0      0.25            as above
    3  2.65   1.67        1.152      3.73915    3.9    0               1.7       0      0.25            as above
    4  0.066  1.152       1.148      0.0759     0      0               0         0      0.25            as above
    5  0.062  1.148       1.114      0.070122   25     0               0         0      0.25            as above
    6  0.05   1.114       1.042      0.0539     53.8   0               0         0      0.25            as above
    7  0.031  1.042       0.955      0.0309535  69.9   0               0         0      0.25            as above

Wing "StabHor"
  location (X Y Z) 4 0 0.405, rotation 0 -2.5 0
  symmetric about XZ
  bounding box size 1.35411 3.49584 0.163234
  totals: TotalSpan=3.486 TotalProjectedSpan=3.486 TotalChord=0.831667 TotalArea=3.63446 TotalAR=3.3436
  root: chord 0.895, twist 0, NACA 4-series Camber=0 CamberLoc=0.2 ThickChord=0.16
  sections:
    n  Span   Root_Chord  Tip_Chord  Area       Sweep  Sweep_Location  Dihedral  Twist  Twist_Location  tip airfoil
    1  0.096  0.895       0.879      0.085152   9.7    0               0         0      0.25            as above
    2  0.146  0.879       1.314      0.160089   9.7    0               0         0      0.25            NACA 4-series Camber=0 CamberLoc=0.2 ThickChord=0.12
    3  1.426  1.314       0.819      1.52083    9.7    0               0         0      0.25            NACA 4-series Camber=0 CamberLoc=0.2 ThickChord=0.09
    4  0.037  0.819       0.77       0.0293965  48.3   0               0         0      0.25            as above
    5  0.019  0.77        0.633      0.0133285  63.7   0               0         0      0.25            as above
    6  0.019  0.633       0.255      0.008436   71.3   0               0         0      0.25            as above

Wing "StabVer"
  location (X Y Z) 0.77 0 0.13, rotation 90 0 0
  bounding box size 5.01374 0.361942 1.79437
  totals: TotalSpan=1.777 TotalProjectedSpan=1.777 TotalChord=1.8978 TotalArea=3.19993 TotalAR=0.986812
  root: chord 4.02, twist 0, NACA 4-series Camber=0 CamberLoc=0.2 ThickChord=0.09
  sections:
    n  Span   Root_Chord  Tip_Chord  Area       Sweep  Sweep_Location  Dihedral  Twist  Twist_Location  tip airfoil
    1  0.38   4.02        3.29       1.3889     74.1   0               0         0      0.25            as above
    2  0.313  3.29        1.428      0.738367   80.9   0               0         0      0.25            as above
    3  0.09   1.428       1.231      0.119655   67.8   0               0         0      0.25            as above
    4  0.067  1.231       1.178      0.0807015  46.9   0               0         0      0.25            as above
    5  0.927  1.178       0.704      0.872307   38.2   0               0         0      0.25            NACA 4-series Camber=0 CamberLoc=0.2 ThickChord=0.06

Fuselage "Fuselage"
  location (X Y Z) -2.42 0 0, rotation 0 0 0
  bounding box size 7.23 1.23305 1.59826
  Design: Length=7.23
  cross sections:
    n  XLocPercent  YLocPercent  ZLocPercent  shape
    0  0            0            0            point
    1  0.0567082    0            0            ellipse Ellipse_Height=0.28 Ellipse_Width=0.28
    2  0.0746888    0            -0.00691563  super ellipse Super_Height=0.52 Super_M=2 Super_MaxWidthLoc=0.29 Super_N=2 Super_Width=0.82
    3  0.149378     0            -0.02213     super ellipse Super_Height=0.98 Super_M=2 Super_MaxWidthLoc=0.29 Super_N=2.69 Super_Width=1
    4  0.210235     0            -0.0193638   super ellipse Super_Height=1.04 Super_M=2 Super_MaxWidthLoc=0.24 Super_N=4 Super_Width=1.07
    5  0.275242     0            0.0124481    general fuselage BotStr=1.5 BotTanAngle=90 CornerRad=0 Height=1.45 LowStr=1 MaxWidthLoc=0 TopStr=2 TopTanAngle=90 UpStr=1.5 Width=1.1
    6  0.507607     0            0.0193638    general fuselage BotStr=1.5 BotTanAngle=90 CornerRad=0 Height=1.22 LowStr=1 MaxWidthLoc=0 TopStr=1.5 TopTanAngle=90 UpStr=1.5 Width=1.1
    7  0.586445     0            0.00968188   super ellipse Super_Height=0.88 Super_M=3 Super_MaxWidthLoc=0 Super_N=3 Super_Width=0.97
    8  0.986169     0            0.0428769    super ellipse Super_Height=0.36 Super_M=2 Super_MaxWidthLoc=0 Super_N=2 Super_Width=0.1
    9  1            0            0.0428769    point

Wing "WingStruts"
  location (X Y Z) -0.55 0.3 -0.49, rotation 0 0 0
  symmetric about XZ
  bounding box size 0.52026 5.31109 1.34643
  totals: TotalSpan=5.4 TotalProjectedSpan=4.62952 TotalChord=0.2 TotalArea=0.8625 TotalAR=24.8492
  root: chord 0.3, twist 0, biconvex ThickChord=0.3
  sections:
    n  Span  Root_Chord  Tip_Chord  Area     Sweep  Sweep_Location  Dihedral  Twist  Twist_Location  tip airfoil
    1  0.2   0.3         0.15       0.045    20.6   0               0         0      0.25            as above
    2  2.35  0.15        0.15       0.3525   4.9    0               29.2      0      0.25            as above
    3  0.15  0.15        0.3        0.03375  -20.6  0               65        0      0.25            as above

Wing "GearNoseStrut"
  location (X Y Z) -1.26 0 -1, rotation 90 0 0
  bounding box size 0.168163 0.08 0.5
  totals: TotalSpan=0.5 TotalProjectedSpan=0.5 TotalChord=0.08 TotalArea=0.04 TotalAR=6.25
  root: chord 0.08, twist 0, circle Circle_Diameter=0.08
  sections:
    n  Span  Root_Chord  Tip_Chord  Area  Sweep  Sweep_Location  Dihedral  Twist  Twist_Location  tip airfoil
    1  0.5   0.08        0.08       0.04  10     0               0         0      0.25            as above

Wing "GearMainStruts"
  location (X Y Z) 0.35 0.4 -0.4, rotation 0 0 0
  symmetric about XZ
  bounding box size 0.202408 2.55455 0.538971
  totals: TotalSpan=2 TotalProjectedSpan=1.73205 TotalChord=0.15 TotalArea=0.3 TotalAR=10
  root: chord 0.15, twist 0, biconvex ThickChord=0.3
  sections:
    n  Span  Root_Chord  Tip_Chord  Area  Sweep  Sweep_Location  Dihedral  Twist  Twist_Location  tip airfoil
    1  1     0.15        0.15       0.15  -3     0               -30       0      0.25            as above

Fuselage "GearNoseFairing"
  location (X Y Z) -1.63 0 -1, rotation 0 0 0
  bounding box size 0.9 0.205502 0.275757
  Design: Length=0.9
  cross sections:
    n  XLocPercent  YLocPercent  ZLocPercent  shape
    0  0            0            0            point
    1  0.25         0            0            super ellipse Super_Height=0.27 Super_M=4 Super_MaxWidthLoc=0 Super_N=4 Super_Width=0.2
    2  0.75         0            0            as above
    3  1            0            0            point

Fuselage "GearMainFairing"
  location (X Y Z) -0.07 1.27 -0.9, rotation 0 0 0
  symmetric about XZ
  bounding box size 1.1 2.76607 0.306348
  Design: Length=1.1
  cross sections:
    n  XLocPercent  YLocPercent  ZLocPercent  shape
    0  0            0            0            point
    1  0.25         0            0            super ellipse Super_Height=0.3 Super_M=4 Super_MaxWidthLoc=0 Super_N=4 Super_Width=0.22
    2  0.75         0            0            as above
    3  1            0            0            point

VSPAERO settings: Sref=16.17 bref=11 cref=1.49 Xcg=0 Ycg=0 Zcg=0.71 AlphaStart=-14 AlphaEnd=19 AlphaNpts=34 BetaStart=0 BetaEnd=0 BetaNpts=1 MachStart=0.19 MachEnd=0 MachNpts=1 ReCref=1e+07 Vinf=100 Rho=0.002377
