OpenVSP model (file version 4), 4 components.
Geometry view with OpenVSP parameter names; values to 6 digits, angles in degrees, lengths in the model's unit.
Overall bounding box: X_Min=-3.63 X_Len=10.31 Y_Min=-5.64025 Y_Len=11.2805 Z_Min=-1.14 Z_Len=3.04

Wing "Wing"
  location (X Y Z) -1.1 0 -0.45, rotation 0 0 0
  symmetric about XZ
  bounding box size 3.30198 11.2805 0.726612
  totals: TotalSpan=11.32 TotalProjectedSpan=11.2805 TotalChord=2.00643 TotalArea=23.0992 TotalAR=5.50884
  root: chord 3.3, twist 0, airfoil file "NAA/NACA 45-100"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 ThickChord=0.12
  sections:
    n  Span  Root_Chord  Tip_Chord  Area    Sweep  Sweep_Location  Dihedral  Twist  Twist_Location  tip airfoil
    1  0.47  3.3         3.3        1.551   0      0               0         1      0.25            as above
    2  0.16  3.3         2.78       0.4864  51.3   0               5         1      0.25            airfoil file "NAA/NACA 45-100"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 ThickChord=0.14
    3  0.96  2.78        2.27       2.424   18.3   0               5         1      0.25            airfoil file "NAA/NACA 45-100"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 ThickChord=0.16
    4  1.76  2.27        1.83       3.608   3.9    0               5         1      0.25            as above
    5  2.12  1.83        1.29       3.3072  3.9    0               5         1      0.25            as above
    6  0.14  1.29        0.81       0.147   33     0               5         1      0.25            as above
    7  0.05  0.81        0.23       0.026   77.8   0               5         1      0.25            as above

Wing "StabH"
  location (X Y Z) 4.6 0 0.42, rotation 0 0 0
  symmetric about XZ
  bounding box size 1.32 4.01755 0.192535
  totals: TotalSpan=4.02 TotalProjectedSpan=4.01755 TotalChord=0.8925 TotalArea=4.1707 TotalAR=3.87003
  root: chord 1.32, twist 0, NACA 64-series A=0 IdealCl=0 ThickChord=0.12
  sections:
    n  Span  Root_Chord  Tip_Chord  Area     Sweep  Sweep_Location  Dihedral  Twist  Twist_Location  tip airfoil
    1  0.26  1.32        1.25       0.3341   8.8    0               -2        0      0.25            as above
    2  1.56  1.25        0.83       1.6224   8.8    0               -2        0      0.25            as above
    3  0.14  0.83        0.65       0.1036   27.6   0               -2        0      0.25            as above
    4  0.05  0.65        0.36       0.02525  44.4   0               -2        0      0.25            as above

Wing "StabV"
  location (X Y Z) 3.98 0 -0.08, rotation 90 0 0
  bounding box size 2.7 0.216027 1.98
  totals: TotalSpan=1.98 TotalProjectedSpan=1.98 TotalChord=1.733 TotalArea=3.33935 TotalAR=1.174
  root: chord 2.05, twist 0, NACA 64-series A=0 IdealCl=0 ThickChord=0.1
  sections:
    n   Span  Root_Chord  Tip_Chord  Area     Sweep  Sweep_Location  Dihedral  Twist  Twist_Location  tip airfoil
    1   0.15  2.05        2.58       0.34725  0      0               0         0      0.25            NACA 64-series A=0 IdealCl=0 ThickChord=0.08
    2   0.16  2.58        2.7        0.4224   0      0               0         0      0.25            as above
    3   0.16  2.7         2.69       0.4312   0      0               0         0      0.25            as above
    4   0.15  2.69        2.66       0.40125  0      0               0         0      0.25            as above
    5   0.29  2.66        1.57       0.61335  74.4   0               0         0      0.25            NACA 64-series A=0 IdealCl=0 ThickChord=0.12
    6   0.15  1.57        1.33       0.2175   54.5   0               0         0      0.25            as above
    7   0.15  1.33        1.2        0.18975  30.6   0               0         0      0.25            as above
    8   0.63  1.2         0.79       0.62685  23.3   0               0         0      0.25            as above
    9   0.1   0.79        0.63       0.071    34.7   0               0         0      0.25            as above
    10  0.04  0.63        0.31       0.0188   53.1   0               0         0      0.25            as above

Fuselage "Fuselage"
  location (X Y Z) -3.63 0 0, rotation 0 0 0
  bounding box size 9.66 0.95 2
  Design: Length=9.66
  cross sections:
    n   XLocPercent  YLocPercent  ZLocPercent  shape
    0   0            0            0            point
    1   0.068323     0            0            circle Circle_Diameter=0.71
    2   0.0828157    0            -0.00517598  ellipse Ellipse_Height=0.86 Ellipse_Width=0.79
    3   0.225673     0            -0.01294     ellipse Ellipse_Height=1.31 Ellipse_Width=0.93
    4   0.369565     0            -0.0124224   ellipse Ellipse_Height=1.44 Ellipse_Width=0.95
    5   0.397516     0            0            ellipse Ellipse_Height=1.67 Ellipse_Width=0.95
    6   0.42029      0            0            ellipse Ellipse_Height=1.69 Ellipse_Width=0.94
    7   0.49793      0            -0.0144928   ellipse Ellipse_Height=2 Ellipse_Width=0.91
    8   0.609731     0            -0.0124224   ellipse Ellipse_Height=1.83 Ellipse_Width=0.86
    9   0.780538     0            0.0113872    ellipse Ellipse_Height=1.06 Ellipse_Width=0.64
    10  0.841615     0            0.0134576    ellipse Ellipse_Height=0.9 Ellipse_Width=0.54
    11  1            0            0.0186335    point

VSPAERO settings: Sref=22.3 bref=11.28 cref=2.02 Xcg=0 Ycg=0 Zcg=0 AlphaStart=-5 AlphaEnd=10 AlphaNpts=16 BetaStart=0 BetaEnd=0 BetaNpts=1 MachStart=0 MachEnd=0 MachNpts=1 ReCref=1e+07 Vinf=100 Rho=0.002377
